*Heading
 stauchen
** Job name: Job_sx-px-J2 Model name: Model-1
** Generated by: Abaqus/CAE 2018
*Preprint, echo=NO, model=NO, history=NO, contact=NO
** ----------------------------------------------------------------
**
** PART INSTANCE: Part-sx
**
*System
          0.,          0.,       15.04,          1.,          0.,       15.04
*Node
      1,   4.89073801,   1.03955841,           0.
      2,   4.56772709,    2.0336833,           0.
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*Element, type=C3D8S
   1,  216,  178,  179,  228,   99,   61,   62,  111
   2,  161,  146,  134,  148,   44,   29,   17,   31
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*Nset, nset=Part-sx__PickedSet5, generate
    1,  1755,     1
*Elset, elset=Part-sx__PickedSet5, generate
    1,  1414,     1
** Section: Section-sx
*Solid Section, elset=Part-sx__PickedSet5, material=Material-sx
,
** ----------------------------------------------------------------
**
** PART INSTANCE: Part-px
**
*System
*Node
   1756,   4.89073801,   1.03955841,           0.
   1757,   4.56772709,    2.0336833,           0.
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*Element, type=C3D8S
1415, 1971, 1933, 1934, 1983, 1854, 1816, 1817, 1866
1416, 1916, 1901, 1889, 1903, 1799, 1784, 1772, 1786
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*Nset, nset=Part-px__PickedSet4, generate
 1756,  3510,     1
*Elset, elset=Part-px__PickedSet4, generate
 1415,  2828,     1
** Section: Section-px
*Solid Section, elset=Part-px__PickedSet4, material=Material-px
,
*System
*Nset, nset=Set-3, generate
 1639,  1755,     1
*Elset, elset=Set-3, generate
 1314,  1414,     1
*Nset, nset=Set-4, generate
1756, 1872,    1
*Elset, elset=Set-4, generate
1415, 1515,    1
*Nset, nset=Set-5, generate
   1,  117,    1
*Elset, elset=Set-5, generate
   1,  101,    1
*Nset, nset=Set-6, generate
 3394,  3510,     1
*Elset, elset=Set-6, generate
 2728,  2828,     1
*Elset, elset=_Surf-px_S1, generate
 2728,  2828,     1
*Surface, type=ELEMENT, name=Surf-px
_Surf-px_S1, S1
*Elset, elset=_Surf-sx_S2, generate
   1,  101,    1
*Surface, type=ELEMENT, name=Surf-sx
_Surf-sx_S2, S2
**
** MATERIALS
**
*Material, name=Material-px
*Depvar
     49,
*Elastic
2., 0.3
*Plastic
 0.003,   0.
 0.005, 0.25
*Material, name=Material-sx
*Depvar
     49,
*Elastic
1., 0.3
*Plastic
 0.002,  0.
 0.005, 0.3
**
** INTERACTION PROPERTIES
**
*Surface Interaction, name=NoFric
1.,
*Friction
0.,
**
** BOUNDARY CONDITIONS
**
** Name: Fixed Type: Displacement/Rotation
*Boundary
Set-4, 1, 1
Set-4, 2, 2
Set-4, 3, 3
Set-4, 4, 4
Set-4, 5, 5
Set-4, 6, 6
** Name: NoSlip Type: Displacement/Rotation
*Boundary
Set-5, 3, 3
Set-5, 4, 4
Set-5, 5, 5
Set-5, 6, 6
** Name: NoSlip2 Type: Displacement/Rotation
*Boundary
Set-6, 3, 3
Set-6, 4, 4
Set-6, 5, 5
Set-6, 6, 6
**
** INTERACTIONS
**
** Interaction: px-sx
*Contact Pair, interaction=NoFric, type=SURFACE TO SURFACE
Surf-px, Surf-sx
** ----------------------------------------------------------------
**
** STEP: Contact
**
*Step, name=Contact, nlgeom=YES, inc=10000
Establish contact
*Static
0.01, 10., 0.0001, 1.
**
** BOUNDARY CONDITIONS
**
** Name: Fixed Type: Displacement/Rotation
*Boundary, op=NEW
Set-4, 1, 1
Set-4, 2, 2
Set-4, 3, 3
Set-4, 4, 4
Set-4, 5, 5
Set-4, 6, 6
** Name: NoSlip Type: Displacement/Rotation
*Boundary, op=NEW
Set-5, 4, 4
Set-5, 5, 5
Set-5, 6, 6
** Name: NoSlip2 Type: Displacement/Rotation
*Boundary, op=NEW
Set-6, 4, 4
Set-6, 5, 5
Set-6, 6, 6
** Name: oben Type: Displacement/Rotation
*Boundary, op=NEW
Set-3, 1, 1
Set-3, 2, 2
Set-3, 3, 3, -7.5
Set-3, 4, 4
Set-3, 5, 5
Set-3, 6, 6
**
** OUTPUT REQUESTS
**
*Restart, write, frequency=0
*Print, solve=NO
**
** FIELD OUTPUT: F-Output-1
**
*Output, field
*Node Output
CF, COORD, RF, U
*Element Output, directions=YES
EEQUT, LE, MVF, PE, PEEQ, PEMAG, S, SEQUT, TE, TEEQ, TEVOL
*Contact Output
CDISP, CSTRESS
**
** HISTORY OUTPUT: H-Output-1
**
*Output, history, variable=PRESELECT
*End Step
** ----------------------------------------------------------------
**
** STEP: Displace
**
*Step, name=Displace, nlgeom=YES, inc=10000
Deformation
*Static
0.01, 10., 0.0001, 1.
**
** OUTPUT REQUESTS
**
*Restart, write, frequency=0
*Print, solve=YES
**
** FIELD OUTPUT: F-Output-1
**
*Output, field
*Node Output
CF, COORD, RF, U
*Element Output, directions=YES
EEQUT, LE, MVF, PE, PEEQ, PEMAG, S, SEQUT, TE, TEEQ, TEVOL
*Contact Output
CDISP, CSTRESS
**
** FIELD OUTPUT: F-Output-2
**
*Node Output
U,
*Element Output, directions=YES
E, EE, IE
**
** HISTORY OUTPUT: H-Output-1
**
*Output, history, variable=PRESELECT
*End Step
