**  One-element  Test:
**    (via *UMAT procedure)
**
**  Model is intended to represent a single crystal metallic bar
**    subjected to uniaxial tension
**
**  This program is based on the "finite strain" version of the
**     constitutive law of a single crystal metal following the Schmid
**     rule, with various hardening options.  It involves a single
**     element.
**
** *************************************************************************
**
**  The UMAT associated with this file has been modified to correct
**     an error in the way in which the Bassani & Wu hardening law
**     was implemented.  For more information, see comment number five
**     in the UMAT.
**
**  The changes require only one modification to the input file.
**     The number of "state dependent variables" (i.e. the DEPVAR command)
**     must be increased to account for the additional state variables.
**     The comment lines near the DEPVAR command in this input file have
**     been modified to reflect the changes made in the UMAT.
**
**  An addendum to the manuscript which describes this UMAT (Huang, Y.,
**     A User-Material Subroutine Incorporating Single Crystal Plasticity
**     in the ABAQUS Finite Element Program, Mech Report 178, Harvard
**     University, 1991.) can be obtained from the same source.
**
**     Jeffrey W. Kysar
**     November, 1997
**     kysar@esag.harvard.edu
**
** ************************************************************************
**
*Heading
** Job name: bar_huang Model name: umatcryspl_mod
** Generated by: Abaqus/CAE 2018
*Preprint, echo=NO, model=NO, history=NO, contact=NO
** ----------------------------------------------------------------
**
** PART INSTANCE: Part-2-1
**
*Node
      1,          10.,          10.,         100.
      2,          10.,           5.,         100.
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*Element, type=C3D8
  1, 106, 107, 112, 111,   1,   2,   7,   6
  2, 107, 108, 113, 112,   2,   3,   8,   7
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*Nset, nset=Part-2-1_Set-1, generate
   1,  630,    1
*Elset, elset=Part-2-1_Set-1, generate
   1,  400,    1
** Section: Section-1-ONE
*Solid Section, elset=Part-2-1_Set-1, material=CRYSTAL
,
*System
*Nset, nset=Set-4
 101, 102, 103, 104, 105, 206
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*Elset, elset=Set-4
  77,  78,  79,  80, 157, 158
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*Nset, nset=Set-5
   1,   2,   3,   4,   5, 106
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*Elset, elset=Set-5
   1,   2,   3,   4,  81,  82
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*Elset, elset=_Surf-2_S3
   1,   2,   3,   4,  81,  82
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*Surface, type=ELEMENT, name=Surf-2
_Surf-2_S3, S3
**
** MATERIALS
**
** COMMENTS FROM *DEPVAR
** =====================
**
**   ITRATN , ITRMAX , GAMERR ,
**     --   ,   --   ,   --   ,
**  ITRATN:  parameter determining whether iteration method is used to
**    solve increments of stresses and state variables in terms of
**    strain increments
**
**    ITRATN=0. --- no iteration
**    otherwise --- iteration
**
**  ITRMAX:  maximum number of iterations
**
**  GAMERR:  absolute error of shear strains in slip systems
**
**
*Material, name=CRYSTAL
*Depvar
    125,
*User Material, constants=160
168400.,121400., 75400.,     0.,     0.,     0.,     0.,     0.
     0.,     0.,     0.,     0.,     0.,     0.,     0.,     0.
     0.,     0.,     0.,     0.,     0.,     0.,     0.,     0.
     3.,     0.,     0.,     0.,     0.,     0.,     0.,     0.
     1.,     1.,     1.,     1.,    -1.,     0.,     0.,     0.
     1.,     1.,    -1.,    -1.,     1.,     0.,     0.,     0.
     1.,    -1.,     1.,     0.,     1.,     1.,     0.,     0.
    -1.,     0.,     1.,     0.,     0.,     1.,     0.,     0.
     0.,     1.,     0.,     0.,     1.,     0.,     0.,     0.
    10.,  0.001,     0.,     0.,     0.,     0.,     0.,     0.
    10.,  0.001,     0.,     0.,     0.,     0.,     0.,     0.
    10.,  0.001,     0.,     0.,     0.,     0.,     0.,     0.
  541.5,  109.5,   60.8,     0.,     0.,     0.,     0.,     0.
     1.,    1.4,     0.,     0.,     0.,     0.,     0.,     0.
  541.5,  109.5,   60.8,     0.,     0.,     0.,     0.,     0.
     1.,    1.4,     0.,     0.,     0.,     0.,     0.,     0.
  541.5,  109.5,   60.8,     0.,     0.,     0.,     0.,     0.
     1.,    1.4,     0.,     0.,     0.,     0.,     0.,     0.
     1.,     1.,     0.,     0.,     0.,     0.,     0.,     0.
     1.,    10.,  1e-05,     0.,     0.,     0.,     0.,     0.
**
** BOUNDARY CONDITIONS
**
** Name: Disp-BC-1 Type: Symmetry/Antisymmetry/Encastre
*Boundary
Set-4, ZSYMM
** Name: Disp-BC-2 Type: Displacement/Rotation
*Boundary
Set-5, 1, 1
Set-5, 2, 2
** ----------------------------------------------------------------
**
** STEP: Step-1
**
*Step, name=Step-1, nlgeom=YES, inc=5000
*Static
0.0005, 1., 1e-07, 0.2
**
** BOUNDARY CONDITIONS
**
** Name: Disp-BC-1 Type: Symmetry/Antisymmetry/Encastre
*Boundary, op=NEW
Set-4, ZSYMM
** Name: Disp-BC-2 Type: Displacement/Rotation
*Boundary, op=NEW
Set-5, 3, 3, 0.5
**
** OUTPUT REQUESTS
**
*Restart, write, frequency=10
**
** FIELD OUTPUT: F-Output-1
**
*Output, field, variable=PRESELECT
**
** HISTORY OUTPUT: H-Output-1
**
*Output, history, variable=PRESELECT
*End Step
