*Heading
** Job name: job-cup-drawing-4 Model name: Model-1
** Generated by: Abaqus/CAE 2018
*Preprint, echo=NO, model=NO, history=NO, contact=NO
** ----------------------------------------------------------------
**
** PART INSTANCE: blank-1-1
**
*System
          0.,          0.,23.0000000238419,          1.,          0.,23.0000000238419
          0.,6.12323399573677e-17,22.0000000238419
*Node
      1,   31.4500008,          20.,           0.
      2,   26.4500008,          15.,           0.
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*Element, type=S4R
  1,   1, 104, 604, 702
  2, 104, 103, 605, 604
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*Element, type=S3
1387, 3216, 3001, 3057
1388, 3173, 3109, 3134
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*Nset, nset=blank-1-1_set-blank, generate
    1,  4399,     1
*Elset, elset=blank-1-1_set-blank, generate
    1,  4340,     1
** Section: section-s4
*Shell Section, elset=blank-1-1_set-blank, material=steel-dp60
4., 5
** ----------------------------------------------------------------
**
** PART INSTANCE: punch-1-1
**
*System
          0.,          0.,-2.99999997615814,          1.,          0.,-2.99999997615814
          0.,6.12323399573677e-17,-3.99999997615814
*Node
   4400,          21.,           0.,           0.
   4401,          26.,           5.,           0.
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*Element, type=S4R
4341, 4400, 4484, 4669, 4750
4342, 4484, 4483, 4670, 4669
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*Element, type=S3
5735, 6278, 6244, 6277
5736, 6196, 6146, 6132
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*Nset, nset=punch-1-1_set-punch, generate
 4400,  6438,     1
*Elset, elset=punch-1-1_set-punch, generate
 4341,  6345,     1
** Section: section-s4
*Shell Section, elset=punch-1-1_set-punch, material=steel-dp60
4., 5
** ----------------------------------------------------------------
**
** PART INSTANCE: sample-2-1
**
*System
          0.,          0.,-0.999999976158144,          1.,          0.,-0.999999976158144
          0.,6.12323399573677e-17,-1.99999997615814
*Node
   6439,          31.,           0.,           0.
   6440,          29.,           0.,           0.
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*Element, type=S3
6346, 10161,  8287,  7935
6347, 10328,  8192,  8505
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*Element, type=S4R
 6463,  7257,  7524,  7410,  6454
 6464,  7948,  7900,  6590,  8042
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*Nset, nset=sample-2-1_sample-2, generate
 6439, 10685,     1
*Elset, elset=sample-2-1_sample-2, generate
 6346, 10546,     1
** Section: section-3
*Shell Section, elset=sample-2-1_sample-2, material=aluminum-1
1.6, 5
*System
*Nset, nset=Set-1, generate
    1,  4399,     1
*Elset, elset=Set-1, generate
    1,  4340,     1
*Nset, nset=Set-2, generate
 4400,  6438,     1
*Elset, elset=Set-2, generate
 4341,  6345,     1
*Elset, elset=_m_Surf-1_SPOS, generate
 5735,  6345,     1
*Surface, type=ELEMENT, name=m_Surf-1
_m_Surf-1_SPOS, SPOS
*Elset, elset=_m_Surf-blank-1_SPOS, generate
    1,  4340,     1
*Surface, type=ELEMENT, name=m_Surf-blank-1
_m_Surf-blank-1_SPOS, SPOS
*Elset, elset=_m_Surf-blank-bottom-ring_SPOS, generate
 397,  891,    1
*Surface, type=ELEMENT, name=m_Surf-blank-bottom-ring
_m_Surf-blank-bottom-ring_SPOS, SPOS
*Elset, elset=_m_Surf-blank-bottom-surf_SPOS, generate
 3544,  4340,     1
*Surface, type=ELEMENT, name=m_Surf-blank-bottom-surf
_m_Surf-blank-bottom-surf_SPOS, SPOS
*Elset, elset=_m_Surf-blank-cylinder_SPOS, generate
  892,  1386,     1
*Surface, type=ELEMENT, name=m_Surf-blank-cylinder
_m_Surf-blank-cylinder_SPOS, SPOS
*Elset, elset=_m_Surf-blank-neck_SNEG, generate
   1,  396,    1
*Surface, type=ELEMENT, name=m_Surf-blank-neck
_m_Surf-blank-neck_SNEG, SNEG
*Elset, elset=_m_Surf-blank-ring_SPOS, generate
 1387,  3543,     1
*Surface, type=ELEMENT, name=m_Surf-blank-ring
_m_Surf-blank-ring_SPOS, SPOS
*Elset, elset=_m_Surf-punch-1_SNEG, generate
 4341,  6345,     1
*Surface, type=ELEMENT, name=m_Surf-punch-1
_m_Surf-punch-1_SNEG, SNEG
*Elset, elset=_m_Surf-punch-1-cylinder_SNEG, generate
 4669,  5734,     1
*Surface, type=ELEMENT, name=m_Surf-punch-1-cylinder
_m_Surf-punch-1-cylinder_SNEG, SNEG
*Elset, elset=_m_Surf-punch-1-ring_SNEG, generate
4341, 4668,    1
*Surface, type=ELEMENT, name=m_Surf-punch-1-ring
_m_Surf-punch-1-ring_SNEG, SNEG
*Elset, elset=_s_Surf-3_SNEG, generate
    1,  4340,     1
*Surface, type=ELEMENT, name=s_Surf-3
_s_Surf-3_SNEG, SNEG
*Elset, elset=_s_Surf-sample-2_SNEG, generate
 6346, 10546,     1
*Surface, type=ELEMENT, name=s_Surf-sample-2
_s_Surf-sample-2_SNEG, SNEG
*Elset, elset=_s_Surf-sample-2-z_SPOS, generate
 6346, 10546,     1
*Surface, type=ELEMENT, name=s_Surf-sample-2-z
_s_Surf-sample-2-z_SPOS, SPOS
**
** MATERIALS
**
*Material, name=aluminum-1
*Elastic
69000., 0.27
*Material, name=steel-dp60
*Elastic
213000., 0.25
*Material, name=steel-twip
*Elastic
165000., 0.35
**
** INTERACTION PROPERTIES
**
*Surface Interaction, name=IntProp-contact-1
1.,
*Friction, slip tolerance=0.005
 0.04,
*Surface Behavior, pressure-overclosure=HARD
**
** BOUNDARY CONDITIONS
**
** Name: fixed-blank Type: Symmetry/Antisymmetry/Encastre
*Boundary
Set-1, ENCASTRE
** Name: fixed-sample Type: Displacement/Rotation
*Boundary
sample-2-1_sample-2, 1, 1
sample-2-1_sample-2, 2, 2
sample-2-1_sample-2, 6, 6
**
** INTERACTIONS
**
** Interaction: contact-1
*Contact Pair, interaction=IntProp-contact-1, type=SURFACE TO SURFACE
s_Surf-sample-2, m_Surf-1
** Interaction: contact-2
*Contact Pair, interaction=IntProp-contact-1, type=SURFACE TO SURFACE
s_Surf-sample-2-z, m_Surf-blank-1
** ----------------------------------------------------------------
**
** STEP: punching
**
*Step, name=punching, nlgeom=YES, inc=10000
*Static
0.01, 1., 1e-10, 0.1
**
** BOUNDARY CONDITIONS
**
** Name: moving-punch Type: Velocity/Angular velocity
*Boundary, type=VELOCITY
Set-2, 3, 3, 10.
**
** OUTPUT REQUESTS
**
*Restart, write, frequency=0
**
** FIELD OUTPUT: F-Output-1
**
*Output, field
*Node Output
RF, RT, U
*Element Output, directions=YES
E, LE, S
**
** HISTORY OUTPUT: H-Output-1
**
*Output, history
*Energy Output
ALLEE,
*End Step
